*Heading
** Job name: cantilever_beam_quad8 Model name: Model-1
** Generated by: Abaqus/CAE 2023
*Preprint, echo=NO, model=NO, history=NO, contact=NO
**
** PARTS
**
*Part, name=Part-1
*Node
      1,         200.,           0.
      2,   197.014923,           0.
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*Element, type=CPS8
  1,   1,   2,  70,  69, 273, 274, 275, 276
  2,   2,   3,  71,  70, 277, 278, 279, 274
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*Nset, nset=_PickedSet2, internal, generate
   1,  744,    1
*Elset, elset=_PickedSet2, internal, generate
   1,  201,    1
** Section: Section-1
*Solid Section, elset=_PickedSet2, material=Material-1
1.,
*End Part
**
**
** ASSEMBLY
**
*Assembly, name=Assembly
**
*Instance, name=Part-1-1, part=Part-1
*End Instance
**
*Nset, nset=Set-fixed, instance=Part-1-1
  68, 136, 204, 272, 473, 608, 743
*Elset, elset=Set-fixed, instance=Part-1-1, generate
  67,  201,   67
*Nset, nset=Set-loaded, instance=Part-1-1
   1,  69, 137, 205, 276, 477, 612
*Elset, elset=Set-loaded, instance=Part-1-1, generate
   1,  135,   67
*Elset, elset=_Surf-loaded_S4, internal, instance=Part-1-1, generate
   1,  135,   67
*Surface, type=ELEMENT, name=Surf-loaded
_Surf-loaded_S4, S4
*End Assembly
**
** MATERIALS
**
*Material, name=Material-1
*Elastic
220000., 0.3
** ----------------------------------------------------------------
**
** STEP: Step-1
**
*Step, name=Step-1, nlgeom=NO
*Static
0.1, 1., 1e-05, 1.
**
** BOUNDARY CONDITIONS
**
** Name: BC-1 Type: Displacement/Rotation
*Boundary
Set-fixed, 1, 1
Set-fixed, 2, 2
Set-fixed, 6, 6
**
** LOADS
**
** Name: Load-1   Type: Surface traction
*Dsload
Surf-loaded, TRSHR, 2., 0., -1., 0.
**
** OUTPUT REQUESTS
**
*Restart, write, frequency=0
**
** FIELD OUTPUT: F-Output-1
**
*Output, field, variable=PRESELECT
**
** HISTORY OUTPUT: H-Output-1
**
*Output, history, variable=PRESELECT
*End Step
