*Heading
** Job name: Job-2 Model name: Cantilever_TetQuadratic
** Generated by: Abaqus/CAE 2024
*Preprint, echo=NO, model=NO, history=NO, contact=NO
**
** PARTS
**
*Part, name=Beam
*Node
      1,         100.,          10.,          10.
      2,         100.,           0.,          10.
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*Element, type=C3D10
   1,  675,  676,  677,  678, 1209, 1208, 1207, 1211, 1210, 1212
   2,  675,  677,  676,  679, 1207, 1208, 1209, 1214, 1213, 1215
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*Nset, nset=_PickedSet2, internal, generate
    1,  8040,     1
*Elset, elset=_PickedSet2, internal, generate
    1,  4957,     1
** Section: Section_Beam
*Solid Section, elset=_PickedSet2, material=Material_Steel
,
*End Part
**
**
** ASSEMBLY
**
*Assembly, name=Assembly
**
*Instance, name=BeamInstance, part=Beam
*End Instance
**
*Node
      1,         100.,           5.,           5.
*Nset, nset=Set_FixedEnd, instance=BeamInstance
    5,    6,    7,    8,   60,   61
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*Elset, elset=Set_FixedEnd, instance=BeamInstance
  418,  489,  734,  770, 1267, 1532
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*Nset, nset=Set_LoadPoint
 1,
*Elset, elset=_Surf_LoadEnd_S3, internal, instance=BeamInstance
  199, 1665, 1668, 1723, 1746, 1749
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*Surface, type=ELEMENT, name=Surf_LoadEnd
_Surf_LoadEnd_S3, S3
** Constraint: Couple_LoadPoint
*Coupling, constraint name=Couple_LoadPoint, ref node=Set_LoadPoint, surface=Surf_LoadEnd
*Kinematic
*End Assembly
**
** MATERIALS
**
*Material, name=Material_Steel
*Elastic
210000., 0.3
**
** BOUNDARY CONDITIONS
**
** Name: BC_Fixed Type: 对称/反对称/完全固定
*Boundary
Set_FixedEnd, ENCASTRE
** ----------------------------------------------------------------
**
** STEP: Step_Load
**
*Step, name=Step_Load, nlgeom=NO
*Static
1., 1., 1e-05, 1.
**
** LOADS
**
** Name: Load_Tip   Type: Concentrated force
*Cload
Set_LoadPoint, 2, -100.
**
** OUTPUT REQUESTS
**
*Restart, write, frequency=0
**
** FIELD OUTPUT: F-Output-1
**
*Output, field, variable=PRESELECT
**
** HISTORY OUTPUT: H-Output-1
**
*Output, history, variable=PRESELECT
*End Step
