*Heading
** Job name: Quad2D Model name: Model-1
** Generated by: Abaqus/CAE 2023
*Preprint, echo=NO, model=NO, history=NO, contact=NO
**
** PARTS
**
*Part, name=Part-1
*Node
      1,         -50.,           0.
      2,          -7.,           0.
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*Element, type=CPS4
  1,  15,  16, 335, 336
  2, 336, 337,  14,  15
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*Nset, nset=_PickedSet3, internal, generate
   1,  960,    1
*Elset, elset=_PickedSet3, internal, generate
   1,  894,    1
** Section: Section-1
*Solid Section, elset=_PickedSet3, material=Material-1
1.,
*End Part
**
**
** ASSEMBLY
**
*Assembly, name=Assembly
**
*Instance, name=Part-1-1, part=Part-1
*End Instance
**
*Nset, nset=Set-1-fixed, instance=Part-1-1
   1,   5,  11,  72,  73,  74,  75, 149, 150, 151, 152
*Nset, nset=Set-2-loaded, instance=Part-1-1
   7,   8,  12, 115, 116, 117, 118, 185, 186, 187, 188
*End Assembly
**
** MATERIALS
**
*Material, name=Material-1
*Elastic
210000., 0.3
** ----------------------------------------------------------------
**
** STEP: Step-1
**
*Step, name=Step-1, nlgeom=NO
*Static
0.1, 1., 1e-05, 1.
**
** BOUNDARY CONDITIONS
**
** Name: BC-1 Type: Displacement/Rotation
*Boundary
Set-1-fixed, 1, 1
Set-1-fixed, 2, 2
Set-1-fixed, 6, 6
**
** LOADS
**
** Name: Load-1   Type: Concentrated force
*Cload
Set-2-loaded, 1, 5000.
**
** OUTPUT REQUESTS
**
*Restart, write, frequency=0
**
** FIELD OUTPUT: F-Output-1
**
*Output, field, variable=PRESELECT
**
** HISTORY OUTPUT: H-Output-1
**
*Output, history, variable=PRESELECT
*End Step
