*Heading
** Job name: quad8 Model name: Model-1
** Generated by: Abaqus/CAE 2023
*Preprint, echo=NO, model=NO, history=NO, contact=NO
**
** PARTS
**
*Part, name=Part-1
*Node
      1,         300.,         100.
      2,           0.,         100.
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*Element, type=CPS8
  1,  119,  773,  266,  120, 2546, 2547, 2548, 2549
  2,  311,  129,  128,  317, 2550, 2551, 2552, 2553
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*Nset, nset=_PickedSet3, internal, generate
    1,  7542,     1
*Elset, elset=_PickedSet3, internal, generate
    1,  2452,     1
** Section: Section-1
*Solid Section, elset=_PickedSet3, material=steal
1.,
*End Part
**
**
** ASSEMBLY
**
*Assembly, name=Assembly
**
*Instance, name=Part-1-1, part=Part-1
*End Instance
**
*Nset, nset=Set-fixed-1, instance=Part-1-1
    2,    3,   36,   37,   38,   39
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*Elset, elset=Set-fixed-1, instance=Part-1-1
  44,  53, 574, 584, 587, 593, 602, 612, 617, 620
*Nset, nset=Set-fixed-2, instance=Part-1-1
 3,
*Nset, nset=Set-loaded, instance=Part-1-1
    1,    4,   74,   75,   76,   77
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*Elset, elset=Set-loaded, instance=Part-1-1
  78,  79,  86, 588, 591, 598, 615, 616, 625, 627
*End Assembly
**
** MATERIALS
**
*Material, name=steal
*Elastic
220000., 0.3
** ----------------------------------------------------------------
**
** STEP: Step-1
**
*Step, name=Step-1, nlgeom=NO, inc=1000
*Static
0.01, 1., 1e-05, 1.
**
** BOUNDARY CONDITIONS
**
** Name: BC-1 Type: Displacement/Rotation
*Boundary
Set-fixed-1, 1, 1
** Name: BC-2 Type: Displacement/Rotation
*Boundary
Set-fixed-2, 2, 2
** Name: BC-3 Type: Displacement/Rotation
*Boundary
Set-loaded, 1, 1, 0.1
**
** OUTPUT REQUESTS
**
*Restart, write, frequency=0
**
** FIELD OUTPUT: F-Output-1
**
*Output, field, variable=PRESELECT
**
** HISTORY OUTPUT: H-Output-1
**
*Output, history, variable=PRESELECT
*End Step
